# Лабораторная работа №1. Вариант 38.
# Левина Эвелина 1ПМ
# Задание 1.
a := 5
b := 6
y := (sqrt(a) - sqrt(b)) = -0.213422
# Задание 2.
y(t) := sqrt(log(t)) - sqrt(ln(t))
x := 1.13, 1.14 .. 2.43
x = [
    1.13; 1.14; 1.15; 1.16; 1.17; 1.18; 1.19; 1.2; 1.21; 1.22
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]
y(x) = [
    -0.119209; -0.123431; -0.127478; -0.131367; -0.135113; -0.138726; -0.142219; -0.1456; -0.148876; -0.152057
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]
# Задание 3.
ln(2)*3^(4^(5 - sqrt(5))) > ln(3)*2^(5^(4 - sqrt(2))) = 1
# Задание 4.
x := 0.01, 0.02 .. 2.01
y(x) := 1/ln(x) - 1/(1 - x)
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# Задание 5.
Given
7*x^5 + 2*x^3 + 3*x == 900
Find(x) → [2.61525288552, 0.813167836749 + 2.53003976139i, 0.813167836749 - 2.53003976139i, -2.12079427951 - 1.56952133654i, -2.12079427951 + 1.56952133654i]
Given
x == 200 + ln(x)
Find(x) → -LambertW(-e^-200)
