# Лабораторная работа №2. Вариант 38.
# Левина Эвелина 1ПМ
# Задание 1.
ORIGIN := 1
n := 1 .. 6
m := 1 .. 6
V[n] := n^3
V = [1; 8; 27; 64; 125; 216]
M[n, m] :=
    (3*n + 0.1) if (n == m)
    (2*n + m) otherwise
M = [
    3.1, 4, 5, 6, 7, 8;
    5, 6.1, 7, 8, 9, 10;
    7, 8, 9.1, 10, 11, 12;
    9, 10, 11, 12.1, 13, 14;
    11, 12, 13, 14, 15.1, 16;
    13, 14, 15, 16, 17, 18.1
]
# Задание 2.
|M| = -0.020369
|M^2| = 0.000414896
condi(M) = 1525.64
cond1(M) = 1278.69
conde(M) = 1342.82
cond2(M) = 670.626
M^-1 = [
    4.61436, -3.9079, -2.43016, -0.952428, 0.525308, 2.00304;
    -3.90299, 6.98562, -2.12578, -1.23717, -0.348569, 0.540036;
    -2.42034, -2.12087, 8.1786, -1.52192, -1.22245, -0.922971;
    -0.937699, -1.22736, -1.51701, 8.19333, -2.09632, -2.38598;
    0.544946, -0.333841, -1.21263, -2.09141, 7.0298, -3.84899;
    2.02759, 0.559674, -0.908243, -2.37616, -3.84408, 4.68801
]  # Задание 3.
# Способ 1: | Способ 2:
X := M^-1*V
X1 := lsolve(M, V) = [345.102; -11.5165; -248.135; -304.754; -121.373; 362.008]
X = [345.102; -11.5165; -248.135; -304.754; -121.373; 362.008]
# Задание 4.
M*M^-1 = [
    1, 0, 0, -1.06581e-14, 0, 0;
    0, 1, 0, 0, 0, 0;
    0, 0, 1, 0, 0, 0;
    0, -2.13163e-14, 2.13163e-14, 1, 0, 0;
    0, -1.95399e-14, 0, 0, 1, 0;
    0, -3.55271e-14, 1.77636e-14, 0, 1.42109e-14, 1
]
# Задание 5.
M*lsolve(M, V) → [1.0; 8.0; 27.0; 64.0; 125.0; 216.0]
M*X → [1; 8; 27; 64; 125; 216]
# Задание 6.
p := 1 .. 8
t := 1 .. 8
N[p, t] :=
    (t + 2*p) if (t ≠ p)
    (30 + t) if (t == p)
|N| = 1.66438e11
N = [
    31, 4, 5, 6, 7, 8, 9, 10;
    5, 32, 7, 8, 9, 10, 11, 12;
    7, 8, 33, 10, 11, 12, 13, 14;
    9, 10, 11, 34, 13, 14, 15, 16;
    11, 12, 13, 14, 35, 16, 17, 18;
    13, 14, 15, 16, 17, 36, 19, 20;
    15, 16, 17, 18, 19, 20, 37, 22;
    17, 18, 19, 20, 21, 22, 23, 38
]
w[p] := p^2
y := N^-1*w
N*y = [1; 4; 9; 16; 25; 36; 49; 64]
w = [1; 4; 9; 16; 25; 36; 49; 64]
# Задание 7.
L := cholesky(N)
L = [
    5.56776, 0, 0, 0, 0, 0, 0, 0;
    0.718421, 5.61105, 0, 0, 0, 0, 0, 0;
    0.898027, 1.13256, 5.55975, 0, 0, 0, 0, 0;
    1.07763, 1.28778, 1.36225, 5.41522, 0, 0, 0, 0;
    1.25724, 1.44301, 1.48148, 1.43461, 5.20425, 0, 0, 0;
    1.43684, 1.59823, 1.60072, 1.51663, 1.4104, 4.95272, 0, 0;
    1.61645, 1.75345, 1.71995, 1.59864, 1.45958, 1.34042, 4.6767, 0;
    1.79605, 1.90868, 1.83918, 1.68066, 1.50875, 1.36248, 1.25548, 4.3835
]
transpose(L) = [
    5.56776, 0.718421, 0.898027, 1.07763, 1.25724, 1.43684, 1.61645, 1.79605;
    0, 5.61105, 1.13256, 1.28778, 1.44301, 1.59823, 1.75345, 1.90868;
    0, 0, 5.55975, 1.36225, 1.48148, 1.60072, 1.71995, 1.83918;
    0, 0, 0, 5.41522, 1.43461, 1.51663, 1.59864, 1.68066;
    0, 0, 0, 0, 5.20425, 1.4104, 1.45958, 1.50875;
    0, 0, 0, 0, 0, 4.95272, 1.34042, 1.36248;
    0, 0, 0, 0, 0, 0, 4.6767, 1.25548;
    0, 0, 0, 0, 0, 0, 0, 4.3835
]
N = [
    31, 4, 5, 6, 7, 8, 9, 10;
    5, 32, 7, 8, 9, 10, 11, 12;
    7, 8, 33, 10, 11, 12, 13, 14;
    9, 10, 11, 34, 13, 14, 15, 16;
    11, 12, 13, 14, 35, 16, 17, 18;
    13, 14, 15, 16, 17, 36, 19, 20;
    15, 16, 17, 18, 19, 20, 37, 22;
    17, 18, 19, 20, 21, 22, 23, 38
]
L*transpose(L) = [
    31, 4, 5, 6, 7, 8, 9, 10;
    4, 32, 7, 8, 9, 10, 11, 12;
    5, 7, 33, 10, 11, 12, 13, 14;
    6, 8, 10, 34, 13, 14, 15, 16;
    7, 9, 11, 13, 35, 16, 17, 18;
    8, 10, 12, 14, 16, 36, 19, 20;
    9, 11, 13, 15, 17, 19, 37, 22;
    10, 12, 14, 16, 18, 20, 22, 38
]
# Задание 8.
N^94 = [
    2.23703e198, 2.403e198, 2.56288e198, 2.71699e198, 2.86565e198, 3.00914e198, 3.14771e198, 3.28163e198;
    2.80859e198, 3.01697e198, 3.2177e198, 3.4112e198, 3.59784e198, 3.77798e198, 3.95196e198, 4.1201e198;
    3.35918e198, 3.60841e198, 3.84849e198, 4.07991e198, 4.30314e198, 4.5186e198, 4.72669e198, 4.92778e198;
    3.88991e198, 4.17851e198, 4.45652e198, 4.72451e198, 4.98301e198, 5.23251e198, 5.47348e198, 5.70634e198;
    4.40184e198, 4.72843e198, 5.04303e198, 5.34629e198, 5.6388e198, 5.92114e198, 6.19382e198, 6.45733e198;
    4.89596e198, 5.25921e198, 5.60913e198, 5.94642e198, 6.27178e198, 6.58581e198, 6.8891e198, 7.18218e198;
    5.37318e198, 5.77184e198, 6.15586e198, 6.52603e198, 6.8831e198, 7.22774e198, 7.56059e198, 7.88225e198;
    5.83435e198, 6.26722e198, 6.68421e198, 7.08615e198, 7.47386e198, 7.84808e198, 8.2095e198, 8.55877e198
]
