# Лабораторная работа №3. Вариант 38.
# Левина Эвелина 1ПМ
# Задание 1.
N := 1 .. 5
ORIGIN := 1
M := 1 .. 8
B[N, M] :=
    (3*N + 3) if (N == M)
    (2*N - M) otherwise
B = [
    6, 0, -1, -2, -3, -4, -5, -6;
    3, 9, 1, 0, -1, -2, -3, -4;
    5, 4, 12, 2, 1, 0, -1, -2;
    7, 6, 5, 15, 3, 2, 1, 0;
    9, 8, 7, 6, 18, 4, 3, 2
]
С :=
    min ← B[1, 1]
    line ← 1
    for i ∈ 1 .. rows(B)
        for j ∈ 1 .. cols(B)
            if (B[i, j] < min)
                min ← B[i, j]
                line ← i
            continue
        continue
    for k ∈ 1 .. cols(B)
        (sum ← (sum + B[line, k])) if (B[line, k] > 0)
С = 6
# Задание 2.
N := 1 .. 4
ORIGIN := 1
M := 1 .. 4
A[N, M] :=
    (2*N) if (N == M)
    (2*N + M) otherwise
A = [2, 4, 5, 6; 5, 4, 7, 8; 7, 8, 6, 10; 9, 10, 11, 8]
D :=
    for i ∈ 1 .. rows(A)
        for j ∈ 1 .. cols(A)
            if (A[i, j] > 0)
                (X[i, j] ← (A[i, j] + 1)) if (mod(A[i, j], 2) == 1)
                X[i, j] ← A[i, j] otherwise
            continue
        continue
    return X
D = [2, 4, 6, 6; 6, 4, 8, 8; 8, 8, 6, 10; 10, 10, 12, 8]
# Задание 3.
F(n) :=
    (3*F(n - 1) - F(n - 2)) if (n > 2)
    1 otherwise
n := 1 .. 10
sum(1/F(n), n) = 2.82413
