# Лабораторная работа №4. Вариант 38.
# Левина Эвелина 1ПМ
# Задание 1.
product(1 - 1/(3*k)^2, k = 1 .. ∞) → 3*sqrt(3)/(2*π)
# Задание 2.
sum(e^(-3*k), k = 1 .. ∞) → -e^-3/(e^-3 - 1)
# Задание 3.
limit(sin(5*x)/sin(9*x), x → 0) → 5/9
limit((2 - sqrt(x - 3))/(x^2 - 49), x → 0) → -2/49 + sqrt(3)*1i/49
# Задание 4.
limit(x*ln(x), x → 0+) → 0
limit(tan(x)^x, x → 0+) → 1
# Задание 5.
y(x) := 2^x*ln(x)
d/dx(y(x)) → 2^x/x + 2^x*ln(2)*ln(x)
y(x) := cot(x)*atan(x)
d/dx(y(x)) → cot(x)/(x^2 + 1) - atan(x)*(cot(x)^2 + 1)
y(x) := x*sqrt(1 - x^2) + asin(x)
d/dx(y(x)) → (1 - x^2)^(-1/2) - x^2/sqrt(1 - x^2) + sqrt(1 - x^2)
# Задание 6.
f(x) := cos(x)/(2 - sin(x))
a(x) := d/dx(f(x)) → cos(x)^2/(sin(x) - 2)^2 + sin(x)/(sin(x) - 2)
a(0) = 0.25
b(x) := d^2/dx^2(f(x)) → cos(x)/(sin(x) - 2) - 2*cos(x)^3/(sin(x) - 2)^3 - 3*cos(x)*sin(x)/(sin(x) - 2)^2
b(1) = -1.27971
c(x) := d^3/dx^3(f(x)) → 6*cos(x)^4/(sin(x) - 2)^4 - 4*cos(x)^2/(sin(x) - 2)^2 + 3*sin(x)^2/(sin(x) - 2)^2 - sin(x)/(sin(x) - 2) + 12*cos(x)^2*sin(x)/(sin(x) - 2)^3
c(2) = 1.00727
# Задание 7.
integral(cot(x)^3, x) → -cot(x)^2/2 - ln(sin(x))
integral((5*x + 3)*sqrt(x^2 + 3*x + 5), x) → 33*ln(x + sqrt(x^2 + 3*x + 5) + 3/2)/8 - 165*ln(2*x + 2*sqrt(x^2 + 3*x + 5) + 3)/16 + 3*(x/2 + 3/4)*sqrt(x^2 + 3*x + 5) + 5*(8*x^2 + 6*x + 13)*sqrt(x^2 + 3*x + 5)/24
# Задание 8.
integral(sin(3*x), x = 0 .. 2*π) → 0
integral(e^(-x)*cos(5*x), x = 0 .. ∞) → 1/26
integral(ln(x)^5, x = 0 .. 1) → -120
# Задание 9.
tan(x)
x + x^3/3 + 2*x^5/15 + 17*x^7/315 + 62*x^9/2835
acos(x)
π/2 - x - x^3/6 - 3*x^5/40 - 5*x^7/112 - 35*x^9/1152
# Задание 10.
k := 3
x := sqrt(k)/(1 - sqrt(k))
h := (1 - k)/sqrt(k)*x^2 - 2*x + sqrt(k) explicit, x → (1 - k)/sqrt(k)*(sqrt(k)/(1 - sqrt(k)))^2 - 2*sqrt(k)/(1 - sqrt(k)) + sqrt(k)
(1 - k)/sqrt(k)*(sqrt(k)/(1 - sqrt(k)))^2 - 2*sqrt(k)/(1 - sqrt(k)) + sqrt(k)
0
(1 - k)/sqrt(k)*x^2 - 2*x + sqrt(k) substitute, x == sqrt(k)/(1 - sqrt(k)) → 0
# Задание 11.
# a)
x^5 - 3*x^4 + (a - b^3)*x^3 + 3*(b^3 - a)*x^2 - a*b^3*x + 3*a*b^3
[3; sqrt(-a); -sqrt(-a); sqrt(b^3); -sqrt(b^3)]
# b)
x^10 - 1
[
    1;
    -1;
    sqrt(2*sqrt(5) - 10)/4 + sqrt(5)/4 + 1/4;
    sqrt(2*sqrt(5) - 10)/4 - sqrt(5)/4 - 1/4;
    sqrt(5)/4 - sqrt(2*sqrt(5) - 10)/4 + 1/4;
    sqrt(-2*sqrt(5) - 10)/4 + sqrt(5)/4 - 1/4;
    sqrt(-2*sqrt(5) - 10)/4 - sqrt(5)/4 + 1/4;
    -sqrt(2*sqrt(5) - 10)/4 - sqrt(5)/4 - 1/4;
    sqrt(5)/4 - sqrt(-2*sqrt(5) - 10)/4 - 1/4;
    1/4 - sqrt(5)/4 - sqrt(-2*sqrt(5) - 10)/4
]
