# Лабораторная работа №5. Вариант 38.
# Левина Эвелина.
#
# Задание 1.
a := 5 + sqrt(34) = 10.831
b := 3/4*25 = 18.75
c := sqrt(67)/4 = 2.04634
ORIGIN := 1
m1 := [a, b, c]
WRITEPRN("1.txt") := m1
# Задание 2.
m2 := [1, 2, 3; 4, 5, 6; 7, 8, 9]
WRITEPRN("2.txt") := m2
# Задание 3.
m3 := READPRN("2.txt") = [1, 2, 3; 4, 5, 6; 7, 8, 9]
# Задание 4.
x := READEXCEL("graphic.xlsx", "Лист1!A1:A5")
y := READEXCEL("graphic.xlsx", "Лист1!B1:B5")
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# Задание 5.
# [component: inputs m2]
